// SBML level 3 version 1
// dcterms:bibliographicCitation: http://identifiers.org/pubmed/10659857

function toggle_repressor_production(alpha, X, n)
  alpha/(1 + X^n);
end

function function_2(alpha, X, n)
  alpha/(1 + X^n);
end
function_2 is "toggle repressor production with induction";

model MODEL1401190000()
  // Gardner2000 - genetic toggle switch in E.coli
  // The behaviour of the genetic toggle switch and the conditions for bistability has been studies using a synthetic, bistable gene circuit.
  // This model is described in the article:
  // Construction of a genetic toggle switch in Escherichia coli.
  // Gardner TS, Cantor CR, Collins JJ
  // Nature. 2000 Jan 20;403(6767):339-42.
  // Abstract:
  // It has been proposed' that gene-regulatory circuits with virtually any desired property can be constructed from networks of simple regulatory elements. These properties, which include multistability and oscillations, have been found in specialized gene circuits such as the bacteriophage lambda switch and the Cyanobacteria circadian oscillator. However, these behaviours have not been demonstrated in networks of non-specialized regulatory components. Here we present the construction of a genetic toggle switch-a synthetic, bistable gene-regulatory network-in Escherichia coli and provide a simple theory that predicts the conditions necessary for bistability. The toggle is constructed from any two repressible promoters arranged in a mutually inhibitory network. It is flipped between stable states using transient chemical or thermal induction and exhibits a nearly ideal switching threshold. As a practical device, the toggle switch forms a synthetic, addressable cellular memory unit and has implications for biotechnology, biocomputing and gene therapy.
  // This model is hosted on BioModels Database and identified by: BIOMD0000000507 .
  // To cite BioModels Database, please use: BioModels Database: An enhanced, curated and annotated resource for published quantitative kinetic models .
  // To the extent possible under law, all copyright and related or neighbouring rights to this encoded model have been dedicated to the public domain worldwide. Please refer to CC0 Public Domain Dedication for more information.
  // biomodels.db:MODEL1401190000
  // biomodels.db:BIOMD0000000507
  // isDescribedBy pubmed:10659857
  // isVersionOf GO:0010468
  // hasProperty mamo:MAMO_0000046
  // hasTaxon taxonomy:562
  // model units - substance: substance, time: time, volume: volume, area: area, length: length, extent: substance

  // Compartments:
  compartment compartment_1 = 1 litre;

  // Species:
  // concentration of repressor 1
  species U in compartment_1 = 0;  // substance in mole; isVersionOf uniprot:P03023
  // concentration of repressor 2
  species V in compartment_1 = 0;  // substance in mole; isVersionOf uniprot:P04483
  species IPTG in compartment_1 = 0;  // substance in mole; isVersionOf CHEBI:61448

  // Parameters:
  // effective rate of synthesis of repressor 1
  alpha1 = 156.25;
  // effective rate of synthesis of repressor 2
  alpha2 = 15.6;
  // the cooperativity of repression of promoter 2
  beta = 2.5;
  // the cooperativity of repression of promoter 1
  gamma = 1;
  K = 2.9618e-5;
  nu = 2.0015;
  var Umodif;
  Initial_for_K = K;
  Initial_for_nu = nu;

  // Assignment rules:
  Umodif := U/(1 + IPTG/Initial_for_K)^Initial_for_nu;

  // Reactions:
  production_of_U: => U; compartment_1*toggle_repressor_production(alpha1, V, beta);  // modifiers: V
  degradation_of_U: U => ; compartment_1*degradation_of_U_k1*U;
    degradation_of_U_k1 = 1;
  production_of_V: => V; compartment_1*function_2(alpha2, Umodif, gamma);
  degration_of_V: V => ; compartment_1*degration_of_V_k1*V;
    degration_of_V_k1 = 1;

  // Unit definitions:
  unit length = metre;
  unit area = metre^2;
  unit volume = litre;
  unit time = second;
  unit substance = mole;
end
